// SBML level 2 version 4

function Constant_flux_irreversible(v)
  v;
end
Constant_flux_irreversible is "Constant flux (irreversible)";

function Rate_Law_for_reaction_4(k, e, s, km)
  k*e*s/(km + s);
end

model Model_1()
  // New Model

  // Compartments:
  compartment compartment_1 = 1;

  // Species:
  species species_1 in compartment_1 = 1;
  species species_2 in compartment_1 = 1;
  species Cln in compartment_1 = 1;

  // Parameters:
  k_d1 = 0;
  var k__Cln_minus;
  V_t = 0;
  var k;

  // Assignment rules:
  k__Cln_minus := species_1/V_t;
  k := 5/V_t;

  // Reactions:
  reaction_1: => species_1; compartment_1*Constant_flux_irreversible(reaction_1_v);
    reaction_1_v = 0.1;
  reaction_2: species_1 => ; compartment_1*k_d1*species_1;
  reaction_3: => species_2; compartment_1*Constant_flux_irreversible(reaction_3_v);
    reaction_3_v = 0.1;
  reaction_4: species_2 => ; compartment_1*Rate_Law_for_reaction_4(k, Cln, species_2, km);  // modifiers: Cln
    km = 0.1;

  // Unit definitions:
  unit volume = 1e-3 litre;
  unit substance = 1e-3 mole;
end
