// SBML level 2 version 4

function Rate_Law_for_production(A_t, V_t, B_R, kp, mRNA)
  A_t/V_t*B_R*kp*mRNA;
end

function function_2(k, substrate, km)
  k*substrate/(km + substrate);
end
function_2 is "Rate Law for michaelian_inactivation";

function Rate_Law_for_Rezeptor_activation(ka, R_i, S, km, Ki, Cln)
  ka*R_i*S/(km + R_i)*1/(1 + Ki*Cln);
end

function function_3(k, V, modifier, substrate, km)
  k/V*modifier*substrate/(km + substrate);
end
function_3 is "Rate Law for michaelian activation";

function Rate_Law_for_degr(k, effector, substrate, v)
  k/v*effector*substrate;
end

model Model_1()
  // New Model

  // Compartments:
  compartment compartment_1 = 1;

  // Species:
  species Rezeptor_i in compartment_1 = 5;
  species secMessenger_i in compartment_1 = 5;
  species Effector_i in compartment_1 = 5;
  species Cln in compartment_1 = 0;
  species Rezeptor_a in compartment_1 = 0;
  species secMessenger_a in compartment_1 = 0;
  species Effector_a in compartment_1 = 0;
  species B_R in compartment_1 = 30;
  species mCLB in compartment_1 = 1;
  species Clb in compartment_1 = 1;

  // Parameters:
  Signal = 0;
  KI = 0.5;
  km_rez = 1;
  k_act_rez = 5;
  V_t = 30;
  km = 4;
  k_act = 50;
  k_inact = 6;
  A_t = 9;
  mRNA = 5;
  k_prod = 0.1;
  k_degr = 1;
  k_effect = 100;

  // Reactions:
  Rezeptor_activation: Rezeptor_i => Rezeptor_a; compartment_1*Rate_Law_for_Rezeptor_activation(k_act_rez, Rezeptor_i, Signal, km_rez, KI, Cln);  // modifiers: Cln
  Rezeptor_inactivation: Rezeptor_a => Rezeptor_i; compartment_1*function_2(k_inact, Rezeptor_a, km);
  secMessenger_activation: secMessenger_i => secMessenger_a; compartment_1*function_3(k_act, V_t, Rezeptor_a, secMessenger_i, km);  // modifiers: Rezeptor_a
  secMessenger_inactivation: secMessenger_a => secMessenger_i; compartment_1*function_2(k_inact, secMessenger_a, km);
  Effector_activation: Effector_i => Effector_a; compartment_1*function_3(k_act, V_t, secMessenger_a, Effector_i, km);  // modifiers: secMessenger_a
  Effector_inactivation: Effector_a => Effector_i; compartment_1*function_2(k_inact, Effector_a, km);
  Effector_prod: => Effector_i; compartment_1*Rate_Law_for_production(A_t, V_t, B_R, k_prod, mRNA);  // modifiers: B_R
  Effector_degr: Effector_i => ; compartment_1*k_degr*Effector_i;
  Rezeptor_prod: => Rezeptor_i; compartment_1*Rate_Law_for_production(A_t, V_t, B_R, k_prod, mRNA);  // modifiers: B_R
  Rezeptor_degr: Rezeptor_i => ; compartment_1*k_degr*Rezeptor_i;
  secMessenger_prod: => secMessenger_i; compartment_1*Rate_Law_for_production(A_t, V_t, B_R, k_prod, mRNA);  // modifiers: B_R
  secMessenger_degr: secMessenger_i => ; compartment_1*k_degr*secMessenger_i;
  Clb_degr: Clb => ; compartment_1*Rate_Law_for_degr(k_effect, Effector_a, Clb, V_t);  // modifiers: Effector_a
  mCLB_degr: mCLB => ; compartment_1*Rate_Law_for_degr(k_effect, Effector_a, mCLB, V_t);  // modifiers: Effector_a

  // Events:
  S_on: at (time > 10): Signal = 1;
  S_off: at (time > 210): Signal = 0;

  // Unit definitions:
  unit volume = 1e-3 litre;
  unit time = 60 second;
  unit substance = 1e-3 mole;
end
