// SBML level 2 version 4

function Constant_flux__irreversible(v)
  v;
end
Constant_flux__irreversible is "Constant flux (irreversible)";

function Rate_Law_for_glycerol_export_1(A_t, kfps1, glycerol, Vos)
  kfps1*glycerol/Vos*A_t;
end

function function_14(A_t, Pe, Lp, Pt, Pi)
  A_t*Lp*(Pt + Pe - Pi);
end
function_14 is "Rate Law for Vos osmoregulation_1";

function function_11(A_t, ktransl, V_t, B_R, mGpd1)
  A_t*(ktransl/V_t)*mGpd1*B_R;
end
function_11 is "Rate law for Cln1/2 production [1]_1";

function Rate_Law_for_Vos_Growth_1(dAddt, dAmdt, BosRatio, B_Am, B_Ad)
  BosRatio*(3/2)*(dAddt*B_Ad^(1/2) + dAmdt*B_Am^(1/2));
end

function function_12(kHog1, ktransc)
  ktransc*kHog1;
end
function_12 is "Rate Law for Gpd1 stress transcription_1";

function function_9(A_t, growth, kosmo, k_R, k_Am, k_Ad, V_t, B_R)
  A_t*growth*(kosmo/(k_R + k_Am + k_Ad + kosmo))*(1/V_t)*B_R;
end
function_9 is "Rate Law for glycerol produciton_1";

model spiesser2012_size_control_Sc()
  // This model is based on core_model_osmo_stress_20140828_clean_addon_newItsnotif_VosPt0fracPar.xml and extends it by an additional parameter khforkosmo to describe an effect of Hog1 activity on glycerol production and will comes in 3 different flavors for different determinations of kosmo as given in CompareVersionsForKosmo.nb. The first corresponds to the oringinal model and does not need to be fitted.

  // Compartments:
  compartment compartment_1 = 1;

  // Species:
  species B_R in compartment_1 = 32.9;
  species B_Am in compartment_1 = 17.9;
  species B_Ad in compartment_1 = 0;
  species glycerol in compartment_1 = 0.499623;
  species Gpd1 in compartment_1 = 9.04e-7;
  species mGpd1 in compartment_1 = 0.0589312554;
  species Vos in compartment_1 = V_t*BosRatio;
  species mB_A in compartment_1 = 1;

  // Parameters:
  A_t = 1;
  // nutrient quality term
  growth = 0.0578939386;
  // energy allocation to internal biomass (ribosomes etc.)
  k_R = 3.56126;
  // energy allocation to biomass mother
  k_Am = 1;
  // energy allocation to biomass daughter
  k_Ad = 1;
  V_t = 1;
  Lp = 2.58e-6;
  var Pt;
  var Pi;
  var Pe;
  var dAddt;
  var dAmdt;
  var Vos0;
  var VosPt0;
  Pt0 = 375000;
  R = 8.314;
  T = 298.5;
  osmoe = 0.26;
  var osmoi;
  cpc = 10^3;
  var Vrel;
  kconvert = 0.66;
  NaCl_conc = 0.3928;
  var itsnotif;
  var factor;
  var kosmo;
  ko1 = 1;
  ko2 = 0.875228;
  ko3 = 40;
  var kfps1;
  kf1 = 0.0070949241;
  kf2 = 18176.02;
  var kHog1;
  kgpd1 = 2.036741e9;
  ktransl = 7.97e-8;
  kdeg2 = 0.0206148371;
  kdeg1 = 0.0313083658;
  kbasal = 6.37e-7;
  ktransc = 0.644424;
  kf3 = 0.1746879;
  BosRatio = 0.6;
  var k__Cln_plus;
  var k__Clb_plus;
  var k__B_R;
  var k__B_Am;
  var k__B_Ad;
  kmgpd1 = 0.001444144;
  VosPt0_fraction = 0.979493554;
  hog1threshold = 0.0748622888;
  khforkosmo = 115.2155;

  // Assignment rules:
  Pe := osmoe*R*T*cpc;
  Vos0 := V_t*BosRatio;
  VosPt0 := V_t*BosRatio*VosPt0_fraction;
  osmoi := B_R*kconvert + glycerol;
  Pi := osmoi/Vos*R*T*cpc;
  Vrel := Vos/V_t + (1 - BosRatio);
  itsnotif := (1 - (Vos0 - Vos)/(Vos0 - VosPt0) + abs(1 - (Vos0 - Vos)/(Vos0 - VosPt0)))/(2*(1 - (Vos0 - Vos)/(Vos0 - VosPt0)));
  Pt := Pt0*(1 - (Vos0 - Vos)/(Vos0 - VosPt0))*itsnotif;
  kfps1 := Pt^kf3/(Pt^kf3 + kf2^kf3)*kf1;
  kHog1 := (1 - Vrel^ko3/(Vrel^ko3 + ko2^ko3))*ko1;
  kosmo := kgpd1*Gpd1^2 + khforkosmo*kHog1;
  factor := (k_R + k_Ad + k_Am)/(k_R + k_Ad + k_Am + kosmo);
  dAddt := A_t*growth*(k_Ad/(k_Ad + k_Am + k_R))*(1/V_t)*mB_A*B_R*factor;
  dAmdt := A_t*growth*(k_Am/(k_Ad + k_Am + k_R))*(1/V_t)*mB_A*B_R*factor;
  k__Cln_plus := 1 - kHog1^10/(kHog1^10 + hog1threshold^10);
  k__Clb_plus := 1 - kHog1^10/(kHog1^10 + hog1threshold^10);
  k__B_R := factor;
  k__B_Am := factor;
  k__B_Ad := factor;

  // Reactions:
  glycerol_export: glycerol => ; compartment_1*Rate_Law_for_glycerol_export_1(A_t, kfps1, glycerol, Vos);  // modifiers: Vos
  glycerol_produciton: => glycerol; compartment_1*function_9(A_t, growth, kosmo, k_R, k_Am, k_Ad, V_t, B_R);  // modifiers: B_R
  Gpd1_base_transcription: => mGpd1; compartment_1*Constant_flux__irreversible(kbasal);
  Gpd1_translation: => Gpd1; compartment_1*function_11(A_t, ktransl, V_t, B_R, mGpd1);  // modifiers: mGpd1, B_R
  mGpd1_deg: mGpd1 => ; compartment_1*kdeg1*mGpd1;
  Gpd1_deg: Gpd1 => ; compartment_1*kdeg2*Gpd1;
  Gpd1_stress_transcription: => mGpd1; compartment_1*function_12(kHog1, ktransc);
  Vos_growth: => Vos; compartment_1*Rate_Law_for_Vos_Growth_1(dAddt, dAmdt, BosRatio, B_Am, B_Ad);  // modifiers: B_Ad, B_Am
  Vos_osmoregulation: Vos => ; compartment_1*function_14(A_t, Pe, Lp, Pt, Pi);

  // Unit definitions:
  unit length = 1e-15 metre;
  unit area = (1e-15 metre)^2;
  unit volume = 1e-15 litre;
  unit time = 60 second;
  unit substance = dimensionless;
end
